// COMSOL Multiphysics 5.1.0.234 model "Comsol_3D_cantilever.mph"
// Outline of the model tree

Parameters
  Height = 20[um]  // Height of beam

Geometry
  geom1 "Geometry 1" (3D, length unit µm)
    blk1: Block | size = {1010, 169, 27.5}
    fin: Finalize "Form Union"

Materials
  mat1: Common "Si - Silicon (single-crystal, isotropic)" on all domains
    def "Basic"
      thermalexpansioncoefficient = 2.6e-6[1/K]
      heatcapacity = 700[J/(kg*K)]
      relpermittivity = 11.7
      density = 2329[kg/m^3]
      thermalconductivity = 130[W/(m*K)]
    Enu "Young's modulus and Poisson's ratio"
      youngsmodulus = 170e9[Pa]
      poissonsratio = 0.28

Physics
  solid: SolidMechanics on all domains
    dependent variable u = {u, v, w}
    lemm1: LinearElasticModel "Linear Elastic Material 1" (default)
    free1: Free (default)
    init1: init "Initial Values 1" (default)
    fix1: Fixed "Fixed Constraint 1" on boundaries 6
    el1: EdgeLoad on edges 4 | LoadType = TotalForce; Ftot = {0, 0, -12e-3}; FperLength = {0, 0, -0.005}

Mesh
  mesh1 "Mesh 1"
    size: MeshSizeDefault | hauto = 3
    ftet1: FreeTet "Free Tetrahedral 1" on remaining entities
      xscale = 1
      yscale = 1
      smoothcontrol = on
      smoothmaxiter = 4
      smoothmaxdepth = 4
      zscale = 1

Studies
  std1 "Study 1"
    param: Parametric "Parametric Sweep" (disabled) | pname = Height; plistarr = range(20e-6,1e-6,50e-6)
    stat: Stationary

Solver configurations
  sol1 "Solution 1" (study std1)
    v1: Variables "Dependent Variables 1"
    s1: Stationary "Stationary Solver 1"
      dDef: Direct
      fc1: FullyCoupled | linsolver = dDef; termonres = auto; reserrfact = 1000
  sol2 "Parametric Solutions 1" (study std1)

Datasets
  dset1: Solution | solution = sol1
  dset2: Solution | solution = sol2

Tables
  mm1: Table "pg2/mms1"
    // Max/min surface
    X | Y | Z | Total displacement (µm)
    1010 | 0 | 0 | 0
    0 | 84.5 | 27.5 | 81.5612

Plots
  pg1: PlotGroup3D "Stress (solid)" | data = dset1
    surf1: Surface | expr = solid.mises
      def: Deform "Deformation" | expr = {u, v, w}
  pg2: PlotGroup3D "Total Deformation" | data = dset1
    mms1: MaxMinSurface | data = dset1; expr = solid.disp; table = mm1
    vol1: Volume | expr = solid.disp